// SBML level 3 version 1

model Teusink2000_Glycolysis()

  // Compartments:
  compartment extracellular = 1;
  compartment cytosol = 1;

  // Species:
  species GLCi in cytosol = 0;
  species G6P in cytosol = 0;
  species F6P in cytosol = 0;
  species F16P in cytosol = 0;
  species TRIO in cytosol = 0;
  species BPG in cytosol = 0;
  species P3G in cytosol = 0;
  species P2G in cytosol = 0;
  species PEP in cytosol = 0;
  species PYR in cytosol = 0;
  species ACE in cytosol = 0;
  species P in cytosol = 0;
  species NAD in cytosol = 0;
  species NADH in cytosol = 0;
  species Glyc in cytosol = 0;
  species Trh in cytosol = 0;
  species CO2 in cytosol = 0;
  species SUCC in cytosol = 0;
  species GLCo in extracellular = 0;
  species ETOH in cytosol = 0;
  species GLY in cytosol = 0;
  species ATP in cytosol = 0;
  species ADP in cytosol = 0;
  species SUM_P in cytosol = 0;
  species AMP in cytosol = 0;
  species F26BP in cytosol = 0;

  // Reactions:
  vGLK: GLCi + P => G6P; 1;  // modifiers: ATP, ADP
  vPGI: G6P => F6P; 1;
  vGLYCO: G6P + P => Glyc; 1;
  vTreha: G6P + P => Trh; 1;
  vPFK: F6P + P => F16P; 1;  // modifiers: AMP, F26BP, ATP
  vALD: F16P => TRIO; 1;
  vGAPDH: TRIO + NAD => BPG + NADH; 1;
  vPGK: BPG => P3G + P; 1;  // modifiers: ATP, ADP
  vPGM: P3G => P2G; 1;
  vENO: P2G => PEP; 1;
  vPYK: PEP => PYR + P; 1;  // modifiers: ATP, ADP
  vPDC: PYR => ACE + CO2; 1;
  vSUC: ACE + NAD + P => NADH + SUCC; 1;
  vGLT: GLCo => GLCi; 1;
  vADH: ACE + NADH => NAD + ETOH; 1;
  vG3PDH: TRIO + NADH => NAD + GLY; 1;
  vATP: P => ; 1;  // modifiers: ATP
end
